# Выбор двигателя
M_н ≡ 22  # Н*м
ω_вых ≡ 0.2  # рад/с
n_вых := 12*60/360 = 2  # об/мин
# Номинальная мощность ЭД:
P_н := M_н*ω_вых = 4.4  # Вт
η_0 := 0.8
ξ := 1.5
# Расчетная величина мощности двигателя:
P_дв.р := ξ*P_н/η_0 = 8.25  # Вт
# Двигатель ДБР-10А:
n_дв := 3000
ω_дв.ном := π*n_дв/30 = 314.159  # рад/с
# Масса:
m := 0.4  # кг
M_дв.ном := 31.831*10^-3 = 0.031831  # Н*м
M_дв.пуск := 9800*10^-3 = 9.8  # Н*м
P_дв.ном := M_дв.ном*ω_дв.ном = 10  # Вт
# Коэффициент запаса по мощности:
n_з := P_дв.ном/P_дв.р = 1.21212
# Общее передаточное число редуктора:
i_0 := n_дв/n_вых = 1500
M'_ст := ξ*M_н/(i_0*η_0)*10^3 = 27.5  # Н*мм
M_дв.пуск == 9800  # Н*мм
M_дв.ном == 32  # Н*мм
# M'_ст | M_дв.пуск
# - условия выполнены, двигатель подходит
# M'_ст | M_дв.ном
i_0 = 1500  # - общее передаточное отношение
# Разобьем редуктор на 4 передачи с однорядным механизмом
# 8*8*6*4 = 1536
i_1 := 4.5
i_2 := 7
i_3 := 7
i_4 := 7  # 7*7*7*4.5=1543.5
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i_1 = 4.5
# Количество саттелитов:
K_1 := 3
z_1a := 32
z_1g := 40
# Условие соосности:
z_1b := z_1a + 2*z_1g = 112
# Условие соседства:
(z_1a + z_1g)*sin(π/K_1) = 62.3538
z_1g + 2 = 42
# Условие сборки:
(z_1a + z_1b)/K_1 = 48
# Передаточное отношение:
U_1 := 1 + z_1b/z_1a = 4.5
z_1a = 32
z_1g = 40
z_1b = 112
i_4 = 7
z_4a := 18
z_4g := 45
# Условие соосности:
z_4b := z_4a + 2*z_4g = 108
# Условие соседства:
(z_4a + z_4g)*sin(π/K_1) = 54.5596
z_4g + 2 = 47
# Условие сборки:
(z_4a + z_4b)/K_1 = 42
# Передаточное отношение:
U_3 := 1 + z_4b/z_4a = 7
z_2a := z_4a = 18
z_3a := 18
z_2g := z_4g = 45
z_3g := 45
z_2b := z_4b = 108
z_3b := 108
# Силовой расчет
M_4h := M_н*10^3 = 22000  # Н*мм
M_3h := M_4h/(1 + z_4b/z_4a) = 3142.86
M_2h := M_3h/(1 + z_3b/z_3a) = 448.98
M_1h := M_2h/(1 + z_2b/z_2a) = 64.1399
M_1a := M_1h/(1 + z_1b/z_1a) = 14.2533
M_дв.ном*10^3 = 31.831  # Н*мм
# Пусть материал для шестерней: Ст 45
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k_0ш := 0.26*0.31  # кгс/мм^2
k_0к := 0.26*0.384
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ψ_d1 := 2*z_1b/z_1a/(z_1b/z_1a - 1)*0.15 = 0.42
d_1a := nthroot(2*(z_1b/z_1a + 1)*M_1a/(ψ_d1*3*(z_1b/z_1a - 1)*k_0ш), 3) = 7.96473
m_1a := d_1a/z_1a = 0.248898
# Учитывая ряд рекомендуемых значений модулей зубчатых колес:
m_1a := 0.3
m_1g := m_1a = 0.3
m_1b := m_1a = 0.3
# Для 2-4 передач:
ψ_d4 := 2*z_4b/z_4a/(z_4b/z_4a - 1)*0.15 = 0.36
d_4a := nthroot(2*(z_4b/z_4a + 1)*M_1a/(ψ_d1*3*(z_4b/z_4a - 1)*k_0ш), 3) = 7.32469
m_4a := d_4a/z_4a = 0.406927
m_4a := 0.5
m_2a := 0.5
m_3a := 0.5
m_4g := m_4a = 0.5
m_2g := 0.5
m_3g := 0.5
m_4b := m_4a = 0.5
m_2b := 0.5
m_3b := 0.5
# Геометрический расчет
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# Для выбранного редуктора:
# Условие соосности:
# Z3=Z1+2⋅Z2
# Условие соседства:
# (Z1+Z2)⋅sin(πK)⩾Z2+2
# Условие сборки:
# Z1+Z3K=Ц
# Передаточное отношение:
# U31h=1+Z3Z1
