# Определение модуля зацепления:
K_m := 1.4  # - коэф. типа профиля зуба, для прямозубых колес
# Y_F | - коэф. формы зуба
K_β := 1  # - коэф. неравномерности нагрузки по ширине колеса 1..1.3
ψ_bm
# - коэф. ширины зубчатого венца 3..16
ψ_bmк := 14
ψ_bmш := 16
[σ_F]  # - допуск. напряжение изгиба МПа
# __________________________________________________________________________
# Сталь 35 - колесо | Сталь 45 - шестерня
# Коэф. лин. расшир.
#
# Плотность
#
# Предел прочности
#
# Предел выносливости
#
# Твердость HB
#
# Термообработка
α := 10.6 .. 12.4*10^-6
1/C
ρ := 7850  # кг/м^3
σ_вк := 520
σ_вш := 580  # МПа
σ_1к := 250
σ_1ш := 280  # МПа
196 .. 263
190 .. 240
# Нормализация, закалка, отпуск
# __________________________________________________________________________
n_зп := 1.5  # - коэф. запаса прочности 1.5..2.0
421/1.5 = 280.667
σ_Fк := 281
280/1.5 = 186.667
σ_Fш := 187
M_н := 22
M_IV := M_н
M_III := 2.82
M_II := 0.3615
M_I := 0.0463
Y_Fк56 := 3.73
Y_Fш56 := 4.15
Y_Fк56/σ_Fк = 0.013274
Y_Fш56/σ_Fш = 0.0221925
z_6 := 18
m_р56 := K_m*nthroot(M_IV*10^3*K_β*Y_Fк56/(z_6*ψ_bmк*σ_Fк), 3) = 1.47052  # мм
m_р56 := K_m*nthroot(M_IV*10^3*K_β*Y_Fш56/(z_6*ψ_bmш*σ_Fш), 3) = 1.66932  # мм
Y_Fк34 := 3.73
Y_Fш34 := 4.15
Y_Fк34/σ_Fк = 0.013274
Y_Fш34/σ_Fш = 0.0221925
z_4 := 54
m_р34 := K_m*nthroot(M_IV*10^3*K_β*Y_Fк34/(z_4*ψ_bmк*σ_Fк), 3) = 1.0196  # мм
Y_Fк12 := 3.73
Y_Fш12 := 4.15
Y_Fк12/σ_Fк = 0.013274
Y_Fш12/σ_Fш = 0.0221925
z_2 := 126
m_р12 := K_m*nthroot(M_IV*10^3*K_β*Y_Fк12/(z_2*ψ_bmк*σ_Fк), 3) = 0.768724  # мм
# Силовой расчет
M_3h := M_н*10^3 = 22000  # Н*мм
M_2h := M_3h/((1 + z_2/z_6)*0.98*0.995) = 2820.22
M_1h := M_2h/((1 + z_2/z_6)*0.98*0.995) = 361.53
M_1a := M_1h/((1 + z_2/z_6)*0.98*0.995) = 46.3453
M_дв.ном*10^3 =  # error: Эта переменная не определена. Проверьте правильность установки обозначения.  # Н*мм
# Пусть материал для шестерней: Ст 45
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k_0ш := 0.26*0.31  # кгс/мм^2
k_0к := 0.26*0.384
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ψ_d1 := 2*z_2/z_6/(z_2/z_6 - 1)*0.15 = 0.35
d_1a := nthroot(2*(z_2/z_6 + 1)*M_1a/(ψ_d1*3*(z_2/z_6 - 1)*k_0ш), 3) = 11.3453
m_1a := d_1a/z_6 = 0.630295
m_56 := 1
m_34 := 1
m_12 := 1
# Геометрический расчет кинематики
# d_f | - диаметр впадин
# d | - делительный диаметр
# b_2 | - ширина колеса
# d_a | - диаметр вершин зубьев
# a | - делительное межосевое расст.
# с* - коэф. радиал. зазора, = 0.5 и 0.35 при m <= 0.5  и  > 0.5 соотв.
z_1 := 18
m_12 = 1
d_1 := m_12*z_1 = 18
d_a1 := m_12*(z_1 + 2) = 20
d_f1 := m_12*(z_1 - 2*(1 + 0.35)) = 15.3
b_1 := ψ_bmш*m_12 = 16
b'_1 := 6
z_2 := 54
m_12 = 1
d_2 := m_12*z_2 = 54
d_a2 := m_12*(z_2 + 2) = 56
d_f2 := m_12*(z_2 - 2*(1 + 0.35)) = 51.3
b_2 := ψ_bmк*m_12 = 14
a_12 := m_12*(z_1 + z_2)/2 = 36
z_4 := 126
m_34 = 1
d_4 := m_34*z_4 = 126
d_a4 := m_34*(2 + z_4) = 128
d_f4 := m_34*(z_4 - 2*(1 + 0.35)) = 123.3
b_4 := ψ_bmк*m_34 = 14
a_34 := m_34*(z_2 + z_4)/2 = 90
# Проверочные расчеты
i := 8
# Проверочный расчет на контактную прочность
σ'_н := 2.6
K := 1.3
σ'_нш := 2.6*196 = 509.6
M_н = 22  # Н*м
σ'_нк := 2.6*190 = 494
Z_E := 0.9
σ_нVII := 108.5*Z_E/(a_12*i)*sqrt(M_н*10^3*K*(i + 1)^3/b_2) = 413.773  # МПа  # σ'_нш  # и  # σ'_нк
# Расчет на точность
# Т.к. критерий выполнения редуктора - равнопрочность, то выбираем сопряжение 7G (!)
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# Кинематическая погрешность:
f_f12 := 11
f_f34 := 11
d_1 = 18
d_2 = 54
i_12 := 8
K_S12 := 0.75
F_р1 := 24
F_р2 := 42
F'_i0min_12 := K_S12*(F_р1 + F_р2) = 49.5
d_3 := d_2 = 54
d_4 = 126
i_34 := 8
K_S34 := 0.75
F_р3 := 42
F_р4 := 48
F'_i0min_34 := K_S34*(F_р3 + F_р4) = 67.5
# Проверочный рачет двигателя - уточненный силовой расчет
f := 0.06
η_подш := 0.995
ε_v := 1.5
M_ст := M_н*10^3 = 22000
F_IV := 2*M_ст/d_1 = 2444.44
C_IV := (F_IV + 2.92)/(F_IV + 0.174) = 1.00112
η_78 := 1 - π*f*ε_v*C_IV*1/2*(1/z_1 + 1/z_4) = 0.991014
M_IV := M_ст/(i*η_78*η_подш) = 2788.88  # Н*мм
F_III := 2*M_IV/d_1 = 309.876
C_III := (F_III + 2.92)/(F_III + 0.174) = 1.00886
η_56 := 1 - π*f*ε_v*C_III*1/2*(1/z_1 + 1/z_4) = 0.990945
M_III := M_IV/(i*η_56*η_подш) = 353.564
F_II := 2*M_III/d_1 = 39.2848
C_II := (F_II + 2.92)/(F_II + 0.174) = 1.06959
η_34 := 1 - π*f*ε_v*C_II*1/2*(1/z_1 + 1/z_4) = 0.990399
M_II := M_III/(i_34*η_34*η_подш) = 44.8481
F_I := 2*M_II/d_1 = 4.98312
C_I := (F_I + 2.92)/(F_I + 0.174) = 1.53247
η_12 := 1 - π*f*ε_v*C_I*1/2*(1/z_1 + 1/z_4) = 0.986245
M_I := M_II/(i_12*η_12*η_подш) = 5.71276  # Н*мм
M_дв.ном := 0.12*1000 = 120
M_I = 5.71276  # - двигатель подходит по крит. стат. момента на валу дв.
# Расчет на быстродействие:
J_пр =  # error
ω_дв.ном =  # error
M_п*10^3 =  # error
M_I = 5.71276
T_эм := J_пр*ω_дв.ном^2/(M_п*10^3 - M_I)  # сек
6.217*10^-6*628.319^2/(19.6 - 2.707) = 0.14529
t_п := 3*T_эм  # - время ПП (разгона)
t_в := J_пр*ω_дв.ном^2/M_I  # сек
# - время выбега
6.217*10^-6*628.319^2/2.707 = 0.906678
i_0 =  # error
M_I = 5.71276
φ_в := J_пр*ω_дв.ном^2/(2*i_0*M_I*10^-3)  # рад  # = 43.32 град
